** INPUT OPTION DETAILS
** --crack_radius 0.005
** --K_max 20.000000
** --R_load 0.700000
** --inp_file tmp.inp
** --output ct_001_K_max_30_R_0_7_rt_51_ramp_blunt.inp
** --euls [ 1.570800 , 0.785400 , 0.000000 ]
** --half_crack_seeds 3
** --elem_through_thickness 1
** --thickness 2.000000
** --ncycles 10.000000
** --Youngs 195603.460000
** --Poissons 0.300000
** --external_radius 1000.000000
** --half_CP_width 100.000000
** --CP_depth 100.000000
** --CP_top_offset 4.000000
** --element_type C3D8RT
** --rise_time 51.000000
** --fall_time 9.000000
** --ramp
** --ramp_cycles 3
** --ramp_step_size 0
** --plane_stress
** --initial_increment_time_step 0.000100
** --min_increment_time_step 0.000000
** --max_increment_time_step 0.030000
** --time_interval 1.000000
**
**
*Heading
** Job name: tmp Model name: Model-1
** Generated by: Abaqus/CAE 2017
*Preprint, echo=NO, model=NO, history=NO, contact=NO
** ----------------------------------------------------------------
**
** PART INSTANCE: Part-1-1
**
*Node,input=tmp_crack_tip_nodes.txt
*Element,type=C3D8RT,input=tmp_crack_tip_elements.txt
*nset, nset=cp
    1,    2,    5,    6,    7,    8
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*elset, elset=cp, generate
  599,  1011,     1
*nset, nset=j2
    1,    2,    3,    4,    5,    6
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*elset, elset=j2, generate
   1,  598,    1
** section: j2
*solid section, elset=j2, material=CP
*HOURGLASS STIFFNESS
 200.
** section: cp
*solid section, elset=cp, material=CP
*HOURGLASS STIFFNESS
 200.
*Nset, nset=ALLB_MATCHED, UNSORTED
   14,    13,    12,    11,    10,     9
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*Nset, nset=ALLF_MATCHED, UNSORTED
    1,     2,     3,     4,     5,     6
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*Nset, nset=MID_NODES
  165,   166,   167,   168,   169,   170
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*system
*nset, nset=allb
    9,   10,   11,   12,   13,   14
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*elset, elset=allb, generate
    1,  1011,     1
*nset, nset=allf
    1,    2,    3,    4,    5,    6
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*elset, elset=allf, generate
    1,  1011,     1
*nset, nset=cp_bottom_edges
   7,   8,  15,  16, 147, 148
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*elset, elset=cp_bottom_edges
  17,  18,  19, 117, 118, 119
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*nset, nset=cp_side_edges
   1,   6,   7,   8,   9,  14
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*elset, elset=cp_side_edges
  10,  34, 110, 111, 112, 113
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*nset, nset=crack_flank
   2,   3,   4,   5,  10,  11
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*elset, elset=crack_flank
  31,  32,  33,  36,  52,  53
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*nset, nset=crack_tip
   2,   5,  10,  13,  17,  18
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*elset, elset=crack_tip
 600, 602, 604, 608, 620, 644
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*nset, nset=external_edges
   3,   4,  11,  12,  67,  68
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*elset, elset=external_edges
  32,  53, 307, 308, 448, 471
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*Amplitude, name=Amp-1, definition=SMOOTH STEP
             0.,              0.,              1000.,              1.
**
** materials
**
*material, name=CP
*depvar
    200,
*user material, constants=8
 1.570800, 0.785400, 0.000000, 1, 1, 1, 1, 1
*user output variables
     20,
*user material, constants=1, type=THERMAL
1.,
*Density
1.,
*Material, name=Elasticity
*Elastic
193000., 0.2565
** ----------------------------
**
** STEP: Step 1
*Step, name=Step1, nlgeom=YES, inc=200000
*Coupled Temperature-displacement, creep=none, DELTMX=2.1e12
 0.0001, 51, 1e-30, 0.03
*CONTROLS,PARAMETERS=TIME INCREMENTATION
 20,20,9,15,15,15,12,90,3,10
 0.5,0.5,0.75,0.85,0.25,0.25,1.5
** BOUNDARY CONDITIONS
*Boundary, USER
external_edges, 1, 3
*Boundary, amplitude=Amp-1
**Boundary
crack_flank, 11, 11, 2.084e12
*Boundary, amplitude=Amp-1
**Boundary
crack_tip, 11, 11, 2.084e12
*Restart, write, frequency=99999
*Output, field, time interval=1
*Node Output
 U, RF, COORD
*Element Output, directions=YES
 E, S, SDV, TEMP, UVARM, PE, TRIAX
*Output, history, frequency=99999
*End Step
